(5 - 1.8)/(10*10^-3) = 320
(5 - 1.8)/(50*10^-3) = 64
2^12 = 4096
8*2^12 = 32768
2^15 = 32768  # Frecventa cuartului
# CD4040:
sqrt(0.25^2 + 0.53^2) = 0.586003  # 0.8 gaura, 1.2 metalizare
# Cuart: | 0.55 x 0.25, pitch
(1.22 - 0.55)/2 = 0.335
# conector DC:
sqrt(1^2 + 1.6^2) = 1.8868
